# 16bit Timer resoliution
CLK := 10 MHz
1/CLK*100000 = 10 ms
DIV := 8
t_res := 1/(CLK/DIV) = 0.8 μs  # Reduce bits number
div := 8
t_max := 2^16*t_res = 52.4288 ms
Value_max := 2^16/div = 8192
c := 340*m/s
t_res2 := div*t_res = 6.4 μs
2^13 = 8192
L_res := c*t_res = 0.272 mm
L_res2 := c*t_res2 = 2.176 mm
L_max := c*t_max = 17.8258 m
t_res*1366*8*c = 2.97242 m
RF_transmit := 1 ms
# RF12 Baud rate calculation [kbs]
cs := 0
Refresh := 1/(t_max + RF_transmit*8) = 16.5484 Hz
R := 2
# PW0268 calculations
Baud := 10000/29/(1 + R)/(1 + cs*7) = 114.943
R_clk := 47 kΩ
# 1 siunčiamą paketą sudaro 7bytes: [0xAA 0xAA 0xAA 0x4D 0xD2 MSB LSB]
C_clk := 22 pF
# Esant xx kbs perdavimui 56 bitus perduos per:
clk := 1/(2*π*R_clk*C_clk) = 153.922 kHz
t_packet := 56/(Baud*10^3)*s = 487.2 μs
# RF02 Baud rate calculation [kbs]
R := 10
Baud := 10000/29/(R + 1) = 31.348
